// COMSOL Multiphysics 6.0.0.318 model "TwoDim(镜面网格).mph"
// Outline of the model tree

Parameters
  lda0 = 1[m]
  ff0 = c_const/lda0
  k0 = pi/L
  L = 1[m]
  kx = k0
  ky = k0/2
  a = 0.2*L
  temp = exp(j*k0*L)
  meshSize = L*0.055463164000000

Geometry
  geom1 "几何 1" (2D, length unit m)
    c1: Circle "圆 1" | rot = 45; r = a; angle = 180
    pol1: Polygon "多边形 1" | source = table; table = {{0.5, 0.5}, {-0.5, 0.5}, {-0.5, -0.5}}
    fin: Finalize "形成联合体"

Materials
  mat1: Common "材料 1" on domains 1
    def "基本"
      electricconductivity = 0
      relpermeability = 1
      relpermittivity = 1
  mat2: Common "材料 2" on domains 2
    def "基本"
      electricconductivity = 0
      relpermeability = 1
      relpermittivity = 1.5*1.5

Physics
  ewfd: ElectromagneticWavesFrequencyDomain "电磁波，频域" on all domains
    dependent variable E = {Ex, Ey, Ez}
    MeshControl.SizeControlParameter = FromStudy
    wee1: WaveEquationElectric "波动方程，电 1" (default) | DisplacementFieldModel = RelativePermittivity
    pec1: PerfectElectricConductor "理想电导体 1" (default)
    init1: init "初始值 1" (default)
    pc1: PeriodicCondition "周期性条件 1" (disabled) on no boundaries | PeriodicType = Floquet; kFloquet = {kx, ky, 0}
    pec2: PerfectElectricConductor "理想电导体 2" (disabled) on no boundaries
    pmc1: PerfectMagneticConductor "理想磁导体 1" on boundaries 2, 4-6

Mesh
  mesh1 "网格 1"
    size: MeshSizeDefault "大小" | hmax = 0.12500; hmin = 3.0000E-4; hcurve = 0.3; hgrad = 1.3; custom = on
    size1: Size "大小 1" on domains 2 | hmax = meshSize/1.5; hauto = 4; custom = on
    size2: Size "大小 2" on domains 1 | hmax = meshSize; hauto = 4; custom = on
    edg1: Edge "边 1" on boundaries 1
      size1: Size "大小 1" on boundaries 1 | hmax = meshSize; custom = on
    cpe1: CopyEdge "复制边 1" | source = boundaries 1; destination = boundaries 3; direction = same
    ftri1: FreeTri "自由三角形网格 1" on remaining entities | smoothmaxiter = 4; smoothmaxdepth = 4

Studies
  std1 "研究 1"
    eig: Eigenfrequency "特征频率" | neigs = 5; eigunit = Hz; shift = ff0; conrad = 1

Solver configurations
  sol1 "解 1" (study std1)
    v1: Variables "因变量 1"
    e1: Eigenvalue "特征值求解器 1"
      d1: Direct "建议的直接求解器 (ewfd)"

Datasets
  dset1: Solution | solution = sol1

Derived values
  gev1: EvalGlobal "特征频率 (ewfd)" | data = dset1; table = tbl1; expr = {ewfd.freq, ewfd.Qfactor}; unit = {Hz, 1}

Tables
  tbl1: Table "表格 1"
    特征频率 (Hz) | 频率 (Hz) | 品质因子 (1)
    2.20837e+08 | 2.20837e+08 | inf
    2.60079e+08 | 2.60079e+08 | inf
    2.60083e+08 | 2.60083e+08 | inf
    2.60084e+08 | 2.60084e+08 | inf
    2.70839e+08 | 2.70839e+08 | inf
    2.70839e+08 | 2.70839e+08 | inf
    2.86529e+08 | 2.86529e+08 | inf
    2.94525e+08 | 2.94525e+08 | inf
    3.68766e+08 | 3.68766e+08 | inf
    3.68767e+08 | 3.68767e+08 | inf
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
Plots
  pg1: PlotGroup2D "电场 (ewfd)" | data = dset1
    surf1: Surface "表面 1" | expr = ewfd.normE