// COMSOL Multiphysics 6.0.0.318 model "OriginalModel(TM).mph"
// Outline of the model tree

Parameters
  lda0 = 1[m]
  ff0 = c_const/lda0
  k0 = pi/L
  L = 1[m]
  kx = k0*n1
  ky = k0*n2
  a = 0.2*L
  n1 = 0.35
  n2 = 0.35
  meshSize = L/20
  n11 = 1
  n22 = 1.5

Geometry
  geom1 "几何 1" (2D, length unit m)
    sq1: Square "正方形 1" | base = center; size = L
    c1: Circle "圆 1" | r = a
    fin: Finalize "形成联合体"

Materials
  mat1: Common "材料 1" on domains 1
    def "基本"
      electricconductivity = 0
      relpermeability = 1
      relpermittivity = n11*n11
  mat2: Common "材料 2" on domains 2
    def "基本"
      electricconductivity = 0
      relpermeability = 1
      relpermittivity = n22*n22

Physics
  ewfd: ElectromagneticWavesFrequencyDomain "电磁波，频域" on all domains
    dependent variable E = {Ex, Ey, Ez}
    ShapeProperty.order_electricfield = 1
    MeshControl.SizeControlParameter = FromStudy
    components.components = outofplane
    wee1: WaveEquationElectric "波动方程，电 1" (default) | DisplacementFieldModel = RelativePermittivity
    pec1: PerfectElectricConductor "理想电导体 1" (default)
    init1: init "初始值 1" (default)
    pc1: PeriodicCondition "周期性条件 1" on boundaries 1, 4
      PeriodicType = Floquet
      kFloquet = {kx, ky, 0}
      destinationDomains: boundaries 4
    pc2: PeriodicCondition "周期性条件 2" on boundaries 2, 3
      PeriodicType = Floquet
      kFloquet = {kx, ky, 0}
      destinationDomains: boundaries 3

Mesh
  mesh1 "网格 1"
    size: MeshSizeDefault "大小" | hmax = 0.37470; hmin = 3.0000E-4; hcurve = 0.3; hgrad = 1.3; custom = on
    size3: Size "大小 3" on domains 1 | hmax = meshSize/n11
    size1: Size "大小 1" on domains 2 | hmax = meshSize/n22
    size2: Size "大小 2" on boundaries 1-4 | hmax = meshSize/n11; custom = on
    edg1: Edge "边 1" on boundaries 1, 2 | smoothmaxiter = 4; smoothmaxdepth = 4
    copy1: Copy "复制 1"
      mesh = mesh1
      source = boundaries 1
      destination = boundaries 4
      smoothmaxiter = 4
      smoothmaxdepth = 4
    copy2: Copy "复制 2"
      mesh = mesh1
      source = boundaries 2
      destination = boundaries 3
      smoothmaxiter = 4
      smoothmaxdepth = 4
    ftri1: FreeTri "自由三角形网格 1" on remaining entities | smoothmaxiter = 4; smoothmaxdepth = 4

Studies
  std1 "研究 1"
    eig: Eigenfrequency "特征频率" | neigs = 12; eigunit = Hz; shift = 1E2; eigwhich = lr; conrad = 1

Solver configurations
  sol1 "解 1" (study std1)
    v1: Variables "因变量 1"
    e1: Eigenvalue "特征值求解器 1"
      d1: Direct "建议的直接求解器 (ewfd)"

Datasets
  dset1: Solution | solution = sol1

Derived values
  gev1: EvalGlobal "特征频率 (ewfd)" | data = dset1; table = tbl5; expr = {ewfd.freq, ewfd.Qfactor}; unit = {Hz, 1}

Tables
  tbl1: Table "表格 1"
    特征频率 (Hz) | 频率 (Hz) | 品质因子 (1)
    2.20837e+08 | 2.20837e+08 | inf
    2.60079e+08 | 2.60079e+08 | inf
    2.60083e+08 | 2.60083e+08 | inf
    2.60084e+08 | 2.60084e+08 | inf
    2.70839e+08 | 2.70839e+08 | inf
    2.70839e+08 | 2.70839e+08 | inf
    2.86529e+08 | 2.86529e+08 | inf
    2.94525e+08 | 2.94525e+08 | inf
    3.68766e+08 | 3.68766e+08 | inf
    3.68767e+08 | 3.68767e+08 | inf
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  tbl2: Table "表格 2"
    n1 (m) | n2 (m) | 特征频率 (Hz) | 频率 (Hz) | 品质因子 (1)
    0 | 0 | 2.20832e+08+7.59248e-07i | 2.20832e+08 | 1.45428e+14
    0 | 0 | 2.60074e+08-2.4207e-06i | 2.60074e+08 | 5.37189e+13
    0 | 0 | 2.60074e+08+1.12112e-06i | 2.60074e+08 | 1.15988e+14
    0 | 0 | 2.94511e+08-4.89562e-07i | 2.94511e+08 | 3.0079e+14
    0 | 0 | 3.68715e+08-0.0825241i | 3.68715e+08 | 2.23398e+09
    0 | 0 | 3.68716e+08+0.184078i | 3.68716e+08 | 1.00152e+09
    0.1 | 0 | 2.19411e+08-4.69226e-07i | 2.19411e+08 | 2.33801e+14
    0.1 | 0 | 2.59469e+08+1.5783e-05i | 2.59469e+08 | 8.21987e+12
    0.1 | 0 | 2.60293e+08+2.81409e-06i | 2.60293e+08 | 4.62482e+13
    0.1 | 0 | 2.96542e+08+2.95481e-06i | 2.96542e+08 | 5.01796e+13
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  tbl3: Table "表格 3"
    n1 (m) | n2 (m) | 特征频率 (Hz) | 频率 (Hz) | 品质因子 (1)
    0.001 | 0 | 130758+6.62663e-07i | 130758 | 9.86608e+10
    0.001 | 0 | 2.20831e+08+0.00125079i | 2.20831e+08 | 8.82767e+10
    0.001 | 0 | 2.60074e+08+0.00561815i | 2.60074e+08 | 2.31459e+10
    0.001 | 0 | 2.60074e+08-0.00522115i | 2.60074e+08 | 2.49058e+10
    0.001 | 0 | 2.94511e+08+0.0127193i | 2.94511e+08 | 1.15774e+10
    0.001 | 0 | 3.68714e+08-2.56182i | 3.68714e+08 | 7.19634e+07
    0.025 | 0 | 3.26889e+06-6.93958e-06i | 3.26889e+06 | 2.35525e+11
    0.025 | 0 | 2.20742e+08-1.51908e-06i | 2.20742e+08 | 7.26564e+13
    0.025 | 0 | 2.60031e+08-4.23422e-06i | 2.60031e+08 | 3.07059e+13
    0.025 | 0 | 2.60088e+08-1.68914e-05i | 2.60088e+08 | 7.69883e+12
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  tbl4: Table "表格 4"
    n1 | n2 | 特征频率 (Hz) | 频率 (Hz) | 品质因子 (1)
    0.001 | 0 | 139399+5.1459e-07i | 139399 | 1.35446e+11
    0.001 | 0 | 2.5005e+08+0.000802709i | 2.5005e+08 | 1.55754e+11
    0.001 | 0 | 2.83119e+08-0.000263275i | 2.83119e+08 | 5.37687e+11
    0.001 | 0 | 2.83135e+08-3.84212e-05i | 2.83135e+08 | 3.68462e+12
    0.001 | 0 | 2.98378e+08+0.00110798i | 2.98378e+08 | 1.34649e+11
    0.001 | 0 | 3.94115e+08-146.588i | 3.94115e+08 | 1.3443e+06
    0.025 | 0 | 3.48495e+06-3.23765e-05i | 3.48495e+06 | 5.38191e+10
    0.025 | 0 | 2.49901e+08-1.21418e-06i | 2.49901e+08 | 1.02909e+14
    0.025 | 0 | 2.82872e+08+1.80446e-06i | 2.82872e+08 | 7.83812e+13
    0.025 | 0 | 2.83155e+08-3.75627e-06i | 2.83155e+08 | 3.7691e+13
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  tbl5: Table "表格 5"
    特征频率 (Hz) | 频率 (Hz) | 品质因子 (1)
    6.88358e+07-9.1469e-08i | 6.88358e+07 | 3.7628e+14
    2.2276e+08-4.84086e-07i | 2.2276e+08 | 2.30083e+14
    2.45143e+08+5.82671e-07i | 2.45143e+08 | 2.10362e+14
    3.17227e+08-2.09914e-07i | 3.17227e+08 | 7.55611e+14
    3.30086e+08-5.13792e-07i | 3.30086e+08 | 3.21225e+14
    3.42936e+08-7.15318e-07i | 3.42936e+08 | 2.39709e+14
    4.00853e+08+1.03527e-07i | 4.00853e+08 | 1.93598e+15
    4.11772e+08+5.08654e-07i | 4.11772e+08 | 4.04766e+14
    4.65507e+08-4.58982e-07i | 4.65507e+08 | 5.07108e+14
    5.01807e+08-0.0358017i | 5.01807e+08 | 7.00815e+09
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
Plots
  pg1: PlotGroup2D "电场 (ewfd)" | data = dset1
    surf1: Surface "表面 1" | expr = ewfd.normE